# OpenSim document version 40000
InverseKinematicsTool:
  results_directory: ./
  model_file: test.osim
  constraint_weight: Inf
  accuracy: 1e-5
  time_range: 0 7
  report_errors: true
  report_marker_locations: false
  IKTaskSet:
    IKMarkerTask XIPH: apply=true weight=.0001
    IKMarkerTask JN: apply=true weight=.0001
    IKMarkerTask T10: apply=true weight=.0001
    IKMarkerTask C7: apply=true weight=1
    IKMarkerTask RASIS: apply=true weight=10
    IKMarkerTask LASIS: apply=true weight=10
    IKMarkerTask RPSIS: apply=true weight=10
    IKMarkerTask LPSIS: apply=true weight=10
    IKMarkerTask RLTHI: apply=true weight=.0001
    IKMarkerTask RLEK: apply=true weight=1
    IKMarkerTask RMEK: apply=true weight=1
    IKMarkerTask RLSHA: apply=true weight=.0001
    IKMarkerTask RLM: apply=true weight=10
    IKMarkerTask RMM: apply=true weight=10
    IKMarkerTask RHEE: apply=true weight=10
    IKMarkerTask RMT5: apply=true weight=5
    IKMarkerTask RMT2: apply=true weight=2
    IKMarkerTask LLTHI: apply=true weight=1
    IKMarkerTask LLEK: apply=true weight=1
    IKMarkerTask LMEK: apply=true weight=1
    IKMarkerTask LLSHA: apply=true weight=.0001
    IKMarkerTask LLM: apply=true weight=10
    IKMarkerTask LMM: apply=true weight=10
    IKMarkerTask LHEE: apply=true weight=10
    IKMarkerTask LMT5: apply=true weight=5
    IKMarkerTask LMT2: apply=true weight=5
