# OpenSim document version 40000
ScaleTool subject01:
  mass: 65 [kg]
  height: 170
  age: 99
  notes: This is an example setup file for scale.exe.
  GenericModelMaker:
    model_file: gait2392_simbodyHBM.osim
    marker_set_file: markersHBM.xml
  ModelScaler:
    scaling_order: measurements manualScale
    marker_file: Calibration.trc
    time_range: 1 2
    preserve_mass_distribution: true
    output_joint_file: subject01_scaledOnly.jnt
    output_muscle_file: subject01_scaledOnly.msl
    output_model_file: subject01_scaledOnly.osim
    output_scale_file: subject01_scaleSet_applied.xml
    ScaleSet: file=subject01_Scale_ScaleSet.xml
    MeasurementSet: file=MU2392_Arms_Scale_MeasurementSet.xml
  MarkerPlacer:
    marker_file: Calibration.trc
    time_range: 1 2
    output_joint_file: subject01.jnt
    output_muscle_file: subject01.msl
    output_model_file: subject01_simbody.osim
    output_motion_file: subject01_static_output.mot
    IKTaskSet MU2392_Arms_Scale:
      # Torso (5 markers)
      IKMarkerTask T10: apply=true weight=.0001
      IKMarkerTask XIPH: apply=true weight=.0001
      IKMarkerTask JN: apply=true weight=.0001
      IKMarkerTask C7: apply=true weight=1
      # Pelvis (3 markers)
      IKMarkerTask RASIS: apply=true weight=10
      IKMarkerTask LASIS: apply=true weight=10
      IKMarkerTask RPSIS: apply=true weight=10
      IKMarkerTask LPSIS: apply=true weight=10
      # Right femur (6 markers)
      IKMarkerTask RLTHI: apply=true weight=.0001
      IKMarkerTask RLEK: apply=true weight=1
      IKMarkerTask RMEK: apply=true weight=1
      # Right tibia (5 markers)
      IKMarkerTask RLSHA: apply=true weight=.0001
      IKMarkerTask RLM: apply=true weight=10
      IKMarkerTask RMM: apply=true weight=10
      # Right foot (6 markers)
      IKMarkerTask RHEE: apply=true weight=10
      IKMarkerTask RMT5: apply=true weight=5
      IKMarkerTask RMT2: apply=true weight=5
      # Left femur  (6 markers)
      IKMarkerTask LLTHI: apply=true weight=.0001
      IKMarkerTask LLEK: apply=true weight=1
      IKMarkerTask LMEK: apply=true weight=1
      # Left tibia (5 markers)
      IKMarkerTask LLSHA: apply=true weight=.0001
      IKMarkerTask LLM: apply=true weight=10
      IKMarkerTask LMM: apply=true weight=10
      # Left foot (6 markers)
      IKMarkerTask LHEE: apply=true weight=10
      IKMarkerTask LMT5: apply=true weight=5
      IKMarkerTask LMT2: apply=true weight=5
      IKCoordinateTask subtalar_angle_r: apply=false weight=1000 value_type=default_value
      IKCoordinateTask mtp_angle_r: apply=false weight=1000 value_type=default_value
      IKCoordinateTask subtalar_angle_l: apply=false weight=1000 value_type=default_value
      IKCoordinateTask mtp_angle_l: apply=false weight=1000 value_type=default_value
      # Helps keep static pose solution from having back bent too much
      IKCoordinateTask lumbar_extension: apply=false weight=10 value_type=manual_value value=0
      IKCoordinateTask pelvis_tilt: weight=1000 apply=false value_type=manual_value value=0
